# Начальные условия:
F_t := 6.6  # kN
v := 0.2  # m/s
D := 200  # mm
B := 450  # mm
# Кинематические расчеты:
P_в := F_t*v = 1.32  # kN
η_ред := 0.98  # Таблица 1.1
η_ц.п. := 0.95
η_общ := η_ред^2*η_ц.п. = 0.91238
P_э.тр := P_в/η_общ = 1.44677  # kN
n_в := 6*10^4*v/(π*D) = 19.0986  # об/мин
u_ред := 25  # Таблица 1.2
u_ц.п. := 2
n_э.тр := n_в*u_ред*u_ц.п. = 954.93  # об/мин
# Выбираем двигатель АИР90L6/925
P := 1.5  # kN
n := 925  # об/мин
u_общ := n/n_в = 48.4329
u_ред := u_общ/u_ц.п. = 24.2164
n_T := n_в*u_ц.п. = 38.1972
η_оп := 0.95
T_T := F_t*D/2/(u_ц.п.*η_ц.п.*η_оп) = 365.651  # N*m
