# Дано: | Толщина стенки:
Т_б := 14.7  # Н*м
Т_т := 351  # Н*м
δ := 1.3*Т_т^(1/4) = 5.62691
δ := 6  # мм
Т_пр := Т_т/(0.98*4.875) = 73.4694  # Н*м
L := 322  # мм
# Вычисления: | Зазор:
# Быстроходный вал:
a := L^(1/3) + 3 = 9.85412
a := 10  # мм
7*Т_б^(1/3) = 17.1476  # мм
b_0 := 3*a = 30
8*Т_б^(1/3) = 19.5973  # мм
d := 20  # мм
t_цил := 3  # мм  # [1, с.54]
d + 2*t_цил = 26  # мм
d_п := 30  # мм
r := 1.5  # мм
d_п + 3*r = 34.5  # мм
d_бп := 36  # мм
# Тихоходный вал:
5*Т_т^(1/3) = 35.27  # мм
6*Т_т^(1/3) = 42.324  # мм
d := 36  # мм  # http://docs.cntd.ru/document/gost-12080-66
t_цил := 3.5  # мм  # [1, с.54]
# нет значений на этой странице
# (d>=17)
d + 2*t_цил = 43  # мм
d_п := 45  # мм
r := 1.5  # мм
d_п + 3*r = 49.5  # мм
d_бп := 50  # мм
d_к := 50  # мм
# Промежуточный вал:
6*Т_пр^(1/3) = 25.1297  # мм
7*Т_пр^(1/3) = 29.3179  # мм
d_к := 28  # мм
f := 1  # мм  # [1, с.54]
d_к + 3*f = 31  # мм
d_бк := 32  # мм
r := 2  # мм
d_к - 3*r = 22  # мм
d_п := 25  # мм
d_п + 3*r = 31  # мм
d_бп := 32  # мм
