# Быстроходный вал:
d := 32  # мм
m := 1.5  # мм
b_2 := 24  # мм
d_ст := 1.5*d = 48  # мм
l := 1.2*d = 38.4  # мм
S := 2.2*m + 0.05*b_2 = 4.5  # мм
S_ст := 0.5*(d_ст - d) = 8  # мм
0.5*(S + S_ст) = 6.25  # мм
0.25*b_2 = 6  # мм
C := 6  # мм
0.6*m = 0.9  # мм
f := 1  # мм
# Тихоходный вал:
d := 50  # мм
m := 2.5  # мм
b_2 := 38  # мм
d_ст := 1.5*d = 75  # мм
l := b_2 = 38  # мм
S := 2.2*m + 0.05*b_2 = 7.4  # мм
S_ст := 0.5*(d_ст - d) = 12.5  # мм
0.5*(S + S_ст) = 9.95  # мм
0.25*b_2 = 9.5  # мм
C := 10  # мм
0.6*m = 1.5  # мм
f := 1, 5  # мм
