# Дано:
# Быстроходный вал
F_t := 733.8  # Н
F_r := 272.2  # Н
F_a := 144.1  # Н
d_2 := 19.8725  # мм
l := 54.5  # мм
l_1 := 28.5  # мм
l_2 := 46.5  # мм
T_б := 14.7  # Н*м
# Решение:
# 0) Консольная сила
F_к := 100*T_б^0.5 = 383.406  # Н
# 1) Радиальные реакции от сил в зацеплении
# В плоскости YOZ
# ΣM1=0
R_2в := (F_r*(l - l_1) + F_a*d_2/2)/l = 156.129  # Н
# ΣM2=0
R_1в := (F_r*l_1 - F_a*d_2/2)/l = 116.071  # Н
# Проверка:
R_1в + R_2в - F_r = 0
# В плоскости XOZ
# ΣM1=0
R_2r := F_t*(l - l_1)/l = 350.07  # Н
# ΣM2=0
R_1r := F_t*l_1/l = 383.73  # Н
# Проверка:
R_1r + R_2r - F_t = 0
R_1 := (R_1r^2 + R_1в^2)^0.5 = 400.901  # Н
R_2 := (R_2r^2 + R_2в^2)^0.5 = 383.308  # Н
# 2) Радиальные реакции от консольной силы
R_r1к := F_к*l_2/l = 327.126  # Н
R_r2к := F_к*(l_2 + l)/l = 710.532  # Н
R_r2к - R_r1к - F_к = 0  # Н
# 3) Полная реакция в опорах
F_r1max := R_1 + R_r1к = 728.027  # Н
F_r2max := R_2 + R_r2к = 1093.84  # Н
# 4) Для типового нагружения II:
K_E := 0.63
F_r1 := K_E*F_r1max = 458.657  # Н
F_r2 := K_E*F_r2max = 689.119  # Н
F_A := K_E*F_a = 90.783  # Н
F_Amax := F_a = 144.1  # Н
# 5) Предварительный выбор пошипников:
# За основу берем шариковый радиальный подшипник №207
d := 35  # мм
D := 72  # мм
B := 17  # мм
D_w := 11.112  # мм
C_r := 25500  # Н
C_0r := 13700  # Н
# 6) Для радиальных шарикоподшипников из условия равновесия:
F_a1 := 0  # Н
F_a2 := F_A = 90.783  # Н
# 7) Дальнейший расчет выполняем для более нагруженного подшипника опоры 2:
D_pw := 0.5*(D + d) = 53.5  # мм
D_w*cos(0)/D_pw = 0.207701
f_0 := 13.7  # (табл. 7.3)
e := 0.28*(f_0*F_A/C_0r)^0.23 = 0.16125
V := 1  # (При вращении внутреннего кольца)
F_A/(V*F_r) = 0.333516
# F_a/(V*F_r) > e
X := 0.56
Y := 0.44/e = 2.72869
К_б := 1.4  # (табл. 7.5)
К_т := 1  # t <= 100 oC
P_r := (V*X*F_r2 + Y*F_A)*К_б*К_т = 887.075  # Н
a_1 := 1  # (табл. 7.6, принимаем вероятность безотказной работы 90%)
a_23 := 0.7  # обычычные условия применения
k := 3  # шариковый подшипниковый
n := 933.4
L_10ah := a_1*a_23*(C_r/P_r)^k*10^6/(60*n) = 296906
# 8) Проверка:
e := 0.28*(f_0*F_Amax/C_0r)^0.23 = 0.179329
F_Amax/(V*F_r) = 0.52939
# F_a/(V*F_r) > e
X := 0.56
Y := 0.44/e = 2.45359
К_б := 1.4  # (табл. 7.5)
К_т := 1  # t <= 100 oC
P_rmax := (V*X*F_r2max + Y*F_Amax)*К_б*К_т = 1352.56  # Н
0.5*C_r = 12750
P_rmax < 0.5*C_r = 1
# Подшипник пригоден (надежность 90%)
P_r/C_r = 0.0347873  # => Для внутреннего кольца (циркуляционное нагружение) Посадка g6 (табл 7.7)
# => Для внешнего кольца (местное нагружение) Посадка ?? (табл 7.8)
