# Дано:
# Промежуточный вал
F_t1 := 3525.0  # Н
F_t2 := 733.8  # Н
F_r1 := 1310.3  # Н
F_r2 := 272.2  # Н
F_a1 := 731.0  # Н
F_a2 := 144.1  # Н
d_1 := 42.351  # мм
d_2 := 200.388  # мм
l_1 := 32  # мм
l_2 := 84  # мм
l_3 := 23  # мм
l := l_1 + l_2 + l_3 = 139  # мм
# Решение:
# 0) Консольная сила
F_к := 0  # Н
# 1) Радиальные реакции от сил в зацеплении
# В плоскости YOZ
# ΣM1=0
R_2в := (F_r1*l_1 + F_a1*d_1/2 + F_r2*(l_1 + l_2) - F_a2*d_2/2)/l = 536.303  # Н
# ΣM2=0
R_1в := (F_r1*(l - l_1) - F_a1*d_1/2 + F_r2*l_3 + F_a2*d_2/2)/l = 1046.2  # Н
# Проверка:
R_1в + R_2в - F_r1 - F_r2 = 5.68434e-14
# В плоскости XOZ
# ΣM1=0
R_2r := (F_t1*l_1 - F_t2*(l - l_3))/l = 199.131  # Н
# ΣM2=0
R_1r := (F_t1*(l - l_1) - F_t2*l_3)/l = 2592.07  # Н
# Проверка:
R_1r + R_2r - F_t1 + F_t2 = -2.27374e-13
R_1 := (R_1r^2 + R_1в^2)^0.5 = 2795.24  # Н
R_2 := (R_2r^2 + R_2в^2)^0.5 = 572.079  # Н
# 3) Полная реакция в опорах
F_r1max := R_1 = 2795.24  # Н
F_r2max := R_2 = 572.079  # Н
# 4) Для типового нагружения II:
K_E := 0.63
F_r1 := K_E*F_r1max = 1761  # Н
F_r2 := K_E*F_r2max = 360.41  # Н
F_A1 := K_E*F_a1 = 460.53  # Н
F_A2 := K_E*F_a2 = 90.783  # Н
F_Amax := max(F_A1, F_A2) = 460.53  # Н
# 5) Предварительный выбор пошипников:
# За основу берем шариковый радиальный подшипник №205
d := 25  # мм
D := 52  # мм
B := 15  # мм
D_w := 7.938  # мм
C_r := 14000  # Н
C_0r := 6950  # Н
# 6) Для радиальных шарикоподшипников из условия равновесия:
F_a1 := F_A1 = 460.53  # Н
F_a2 := F_A2 = 90.783  # Н
# 7) Дальнейший расчет выполняем для более нагруженного подшипника опоры 1:
D_pw := 0.5*(D + d) = 38.5  # мм
D_w*cos(0)/D_pw = 0.206182
f_0 := 13.7  # (табл. 7.3)
e := 0.28*(f_0*F_A1/C_0r)^0.23 = 0.27384
V := 1  # (При вращении внутреннего кольца)
F_A1/(V*F_r1) = 0.261516
# F_a1/(V*F_r1) > e
X := 0.56
Y := 0.44/e = 1.60678
К_б := 1.4  # (табл. 7.5)
К_т := 1  # t <= 100 oC
P_r := (V*X*F_r1 + Y*F_A1)*К_б*К_т = 2416.58  # Н
a_1 := 1  # (табл. 7.6, принимаем вероятность безотказной работы 90%)
a_23 := 0.7  # обычычные условия применения
k := 3  # шариковый подшипниковый
n := 933.4/5.038 = 185.272
L_10ah := a_1*a_23*(C_r/P_r)^k*10^6/(60*n) = 12243.8
# 8) Проверка:
e := 0.28*(f_0*F_Amax/C_0r)^0.23 = 0.27384
F_Amax/(V*F_r1) = 0.261516
# F_a1/(V*F_r1) > e
X := 0.56
Y := 0.44/e = 1.60678
К_б := 1.4  # (табл. 7.5)
К_т := 1  # t <= 100 oC
P_rmax := (V*X*F_r1max + Y*F_Amax)*К_б*К_т = 3227.42  # Н
0.5*C_r = 7000
P_rmax < 0.5*C_r = 1
# Подшипник пригоден (надежность 90%)
P_r/C_r = 0.172613  # => Для внутреннего кольца (циркуляционное нагружение) Посадка k6 (табл 7.7)
# => Для внешнего кольца (местное нагружение) Посадка H7 (табл 7.8)
