# Дано:
# Тихоходный вал
F_t := 3525.0  # Н
F_r := 1310.3  # Н
F_a := 731.0  # Н
d_2 := 98.8245  # мм
l := 71  # мм
33 + 59 = 92
l_1 := 42  # мм
l_2 := 92  # мм
T_т := 73.5  # Н*м
# Решение:
# 0) Консольная сила
F_к := 200*T_т^0.5 = 1714.64  # Н
# 1) Радиальные реакции от сил в зацеплении
# В плоскости YOZ
d_2/2 = 49.4123
# ΣM1=0
R_2в := (F_r*(l - l_1) + F_a*d_2/2)/l = 1043.93  # Н
# ΣM2=0
R_1в := (F_r*l_1 - F_a*d_2/2)/l = 266.37  # Н
# Проверка:
R_1в + R_2в - F_r = 0
# В плоскости XOZ
# ΣM1=0
R_2r := F_t*(l - l_1)/l = 1439.79  # Н
# ΣM2=0
R_1r := F_t*l_1/l = 2085.21  # Н
# Проверка:
R_1r + R_2r - F_t = 0
R_1 := (R_1r^2 + R_1в^2)^0.5 = 2102.16  # Н
R_2 := (R_2r^2 + R_2в^2)^0.5 = 1778.42  # Н
# 2) Радиальные реакции от консольной силы
R_r1к := F_к*l_2/l = 2221.79  # Н
R_r2к := F_к*(l_2 + l)/l = 3936.43  # Н
R_r2к - R_r1к - F_к = 0  # Н
# 3) Полная реакция в опорах
F_r1max := R_1 + R_r1к = 4323.95  # Н
F_r2max := R_2 + R_r2к = 5714.85  # Н
# 4) Для типового нагружения II:
K_E := 0.63
F_r1 := K_E*F_r1max = 2724.09  # Н
F_r1max = 4323.95
F_r2 := K_E*F_r2max = 3600.36  # Н
F_r2max = 5714.85
F_A := K_E*F_a = 460.53  # Н
F_a = 731
F_Amax := F_a = 731  # Н
# 5) Предварительный выбор пошипников:
# За основу берем шариковый радиальный подшипник №209
d := 60  # мм
D := 110  # мм
B := 22  # мм
D_w := 15.875  # мм
C_r := 52000  # Н
C_0r := 31000  # Н
# 6) Для радиальных шарикоподшипников из условия равновесия:
F_a1 := 0  # Н
F_a2 := F_A = 460.53  # Н
# 7) Дальнейший расчет выполняем для более нагруженного подшипника опоры 2:
D_pw := 0.5*(D + d) = 85  # мм
D_w*cos(0)/D_pw = 0.186765
f_0 := 13.7  # (табл. 7.3)
e := 0.28*(f_0*F_A/C_0r)^0.23 = 0.194151
V := 1  # (При вращении внутреннего кольца)
F_A/(V*F_r) = 0.351469
# F_a/(V*F_r) > e
X := 0.56
Y := 0.44/e = 2.26628
К_б := 1.4  # (табл. 7.5)
К_т := 1  # t <= 100 oC
P_r := (V*X*F_r2 + Y*F_A)*К_б*К_т = 4283.84  # Н
a_1 := 1  # (табл. 7.6, принимаем вероятность безотказной работы 90%)
a_23 := 0.7  # обычычные условия применения
k := 3  # шариковый подшипниковый
n := 38
L_10ah := a_1*a_23*(C_r/P_r)^k*10^6/(60*n) = 549126
# 8) Проверка:
e := 0.28*(f_0*F_Amax/C_0r)^0.23 = 0.215919
F_Amax/(V*F_r) = 0.557888
# F_a/(V*F_r) > e
X := 0.56
Y := 0.44/e = 2.0378
К_б := 1.4  # (табл. 7.5)
К_т := 1  # t <= 100 oC
P_rmax := (V*X*F_r2max + Y*F_Amax)*К_б*К_т = 6565.93  # Н
0.5*C_r = 26000
P_rmax < 0.5*C_r
# Подшипник пригоден (надежность 90%)
P_r/C_r = 0.0823816  # => Для внутреннего кольца (циркуляционное нагружение) Посадка k6 (табл 7.7)
# => Для внешнего кольца (местное нагружение) Посадка H7 (табл 7.8)
