# Ведущее колесо:
# Делительный диаметр:
d_d := 202.66  # мм
# Диаметр выступов:
D_e := 214.52  # мм
# Диаметр впадин:
D_i := 186.80  # мм
# Диаметр обода (проточки):
D_c := 169.60  # мм
# Диаметр ролика цепи:
d_3 := 169.60  # мм
# Ширина зуба звездочки:
b_2 := 14.1  # мм
# Расстояние между рядами цепи:
A := 29.1  # мм
# Ширина венца многорядной
# звездочки:
B_2 := A + b_2 = 43.2  # мм
# Радиус закругления зуба:
r_3 := 1.7*d_3 = 288.32  # мм
# Координата центра радиуса r_3:
h_3 := 0.8*d_3 = 135.68  # мм
# Толщина обода:
δ := 1.5*(D_e - d_d) = 17.79  # мм
# Толщина диска:
С := 1.25*δ = 22.2375  # мм
