# Дано:
Т_б := 14.7  # Н*м
Т_т := 351  # Н*м
# Вычисления:
# Быстроходный вал:
7*Т_б^(1/3) = 17.1476  # мм
8*Т_б^(1/3) = 19.5973  # мм
d := 20  # мм
t_цил := 3  # мм  # [1, с.54]
d + 2*t_цил = 26  # мм
d_п := 30  # мм
r := 1.5  # мм
d_п + 3*r = 34.5  # мм
d_бп := 36  # мм
# Тихоходный вал:
5*Т_б^(1/3) = 12.2483  # мм
6*Т_б^(1/3) = 14.698  # мм
d := 14  # мм  # http://docs.cntd.ru/document/gost-12080-66
t_цил := 3  # мм  # [1, с.54]
# нет значений на этой странице
# (d>=17)
d + 2*t_цил = 20  # мм
d_п := 25  # мм
r := 1.5  # мм
d_п + 3*r = 29.5  # мм
d_бп := 30  # мм
d_к := 30  # мм
# Промежуточный вал:
6*Т_б^(1/3) = 14.698  # мм
7*Т_б^(1/3) = 17.1476  # мм
d_к := 15  # мм  # Нет значений для таблицы
f := 1  # мм  # [1, с.54]
d_к + 3*f = 18  # мм
d_бк := 18  # мм
r := 1.5  # мм
# dп=15мм
# D=24мм
# B=5мм
d_к - 3*r = 10.5  # мм  # http://docs.cntd.ru/document/gost-8338-75
d_п := 15  # мм
# Увеличиваем диаметр подшипника почти в 2 раза
d_п + 3*r = 19.5  # мм
d_бп := 20  # мм
